// SBML level 2 version 4

model untitled()
  // untitled

  // Compartments:
  compartment Lymphocyte = 1;
  compartment Nucleus in Lymphocyte = 1;

  // Species:
  species $DNA in Nucleus = 1;
  species mRNA_2 in Nucleus = 0; mRNA_2 is "mRNA-2";
  species E_cER_2 in Nucleus = 0; E_cER_2 is "(E-cER)2";
  species mRNA_3 in Nucleus = 0; mRNA_3 is "mRNA-3";
  species mRNA_1 in Nucleus = 0; mRNA_1 is "mRNA-1";
  species mRNA_4 in Nucleus = 0; mRNA_4 is "mRNA-4";
  species mRNA_5 in Nucleus = 0; mRNA_5 is "mRNA-5";
  species mRNA_6 in Nucleus = 0; mRNA_6 is "mRNA-6";
  species mRNA_7 in Nucleus = 0; mRNA_7 is "mRNA-7";
  species CHOP_Nucleus in Nucleus = 0;
  species a1_AR in Lymphocyte = 0.1753; a1_AR is "a1-AR";
  species phenylephrine in Lymphocyte = 1000;
  species a1AR_Phe in Lymphocyte = 0; a1AR_Phe is "a1AR-Phe*";
  species a2_AR in Lymphocyte = 0.0199; a2_AR is "a2-AR";
  species clonidine in Lymphocyte = 1000;
  species a2AR_Clo in Lymphocyte = 0; a2AR_Clo is "a2AR-Clo";
  species p_ERK in Lymphocyte = 0; p_ERK is "p-ERK";
  species ERK in Lymphocyte = 251;
  species CREB in Lymphocyte = 245.6;
  species p_CREB in Lymphocyte = 0; p_CREB is "p-CREB";
  species IFN_g in Lymphocyte = 560; IFN_g is "IFN-g";
  // Units:receptor/cell
  species IFNGR in Lymphocyte = 0.0002265;
  species IFNg_IFNGR in Lymphocyte = 0; IFNg_IFNGR is "IFNg-IFNGR";
  species IFNg_IFNGR_2_Lymphocyte_26 in Lymphocyte = 0; IFNg_IFNGR_2_Lymphocyte_26 is "(IFNg-IFNGR)2";
  species IFNg_IFNGR_2_Lymphocyte_27 in Lymphocyte = 0; IFNg_IFNGR_2_Lymphocyte_27 is "(IFNg-IFNGR*)2";
  species MEK in Lymphocyte = 257;
  species MEK_raf in Lymphocyte = 0; MEK_raf is "MEK-raf*";
  species MEK_P in Lymphocyte = 0; MEK_P is "MEK-P";
  species pMEK_raf_2 in Lymphocyte = 0; pMEK_raf_2 is "pMEK-raf*2";
  species MEK_pp in Lymphocyte = 0; MEK_pp is "MEK-pp";
  species cbp in Lymphocyte = 257;
  species Estrogen in Lymphocyte = 1000;
  species $GPCR in Lymphocyte = 1;
  species PKA_Lymphocyte_36 in Lymphocyte = 257;
  species PKA_Lymphocyte_37 in Lymphocyte = 0; PKA_Lymphocyte_37 is "PKA*";
  species ER in Lymphocyte = 6.204e-7;
  species E_ER in Lymphocyte = 0; E_ER is "E-ER";
  species shc_grb2_sos in Lymphocyte = 250; shc_grb2_sos is "shc-grb2-sos";
  species EER_shcgrb2sos in Lymphocyte = 0; EER_shcgrb2sos is "EER-shcgrb2sos";
  species pi3k_Lymphocyte_42 in Lymphocyte = 257;
  species pi3k_Lymphocyte_43 in Lymphocyte = 0; pi3k_Lymphocyte_43 is "pi3k*";
  species Akt in Lymphocyte = 219;
  species NO in Lymphocyte = 10;
  species BCL2_Lymphocyte_46 in Lymphocyte = 300;
  species BCL2_Lymphocyte_47 in Lymphocyte = 0; BCL2_Lymphocyte_47 is "BCL2*";
  species survival_signal in Lymphocyte = 0;
  species $cER in Lymphocyte = 1.36e-7;
  species E_cER in Lymphocyte = 0; E_cER is "E-cER";
  species $b2_AR in Lymphocyte = 0.000391; b2_AR is "b2-AR";
  species terbutaline in Lymphocyte = 1000;
  species b2AR_Ter in Lymphocyte = 0; b2AR_Ter is "b2AR-Ter";
  species IL_2 in Lymphocyte = 750; IL_2 is "IL-2";
  species ras_Lymphocyte_55 in Lymphocyte = 0; ras_Lymphocyte_55 is "ras*";
  species ras_Lymphocyte_56 in Lymphocyte = 250;
  species raf_Lymphocyte_57 in Lymphocyte = 112.5585;
  species raf_Lymphocyte_58 in Lymphocyte = 0; raf_Lymphocyte_58 is "raf*";
  species CAAT in Lymphocyte = 0;
  species BAX in Lymphocyte = 200;
  species BCL2_BAX_dimer in Lymphocyte = 0; BCL2_BAX_dimer is "BCL2-BAX dimer";
  species apoptosis in Lymphocyte = 0;
  species $iNOS in Lymphocyte = 0;
  species $L_Arg in Lymphocyte = 200;
  species CAT in Lymphocyte = 10;
  species superoxides in Lymphocyte = 80;
  species SOD in Lymphocyte = 0;
  species Peroxynitrite in Lymphocyte = 80;
  species cAMP in Lymphocyte = 0;
  species p_Akt in Lymphocyte = 0; p_Akt is "p-Akt";
  species C_EBP in Lymphocyte = 0; C_EBP is "C/EBP";
  species CHOP_Lymphocyte in Lymphocyte = 0;
  species cbp_creb in Lymphocyte = 0; cbp_creb is "cbp-creb";

  // Reactions:
  agonist_binding: a1_AR + phenylephrine => a1AR_Phe; agonist_binding_vm*phenylephrine/(km + phenylephrine);
    agonist_binding_vm = 0.0001753; km = 0.65;
  a2_Agonist_binding: a2_AR + clonidine => a2AR_Clo; va*clonidine/(kn + clonidine);
    va = 1.99e-5; kn = 3.7;
  ERK_phosphorylation: ERK + MEK_pp => p_ERK; ka2*ERK*MEK_pp;
    ka2 = 1;
  CREB_Phosphorylation: p_ERK + CREB => p_CREB + ERK; pe*p_ERK*CREB;
    pe = 1;
  IFNg_binding: IFNGR + IFN_g => IFNg_IFNGR; IFNg_binding_vm*CREB/(kd + CREB);
    IFNg_binding_vm = 0.00022654; kd = 0.9;
  IFNGR_dimerisation: IFNg_IFNGR => IFNg_IFNGR_2_Lymphocyte_26; rd*IFNg_IFNGR;
    rd = 1;
  IFNGR_activation: IFNg_IFNGR_2_Lymphocyte_26 => IFNg_IFNGR_2_Lymphocyte_27; rc*IFNg_IFNGR_2_Lymphocyte_26;
    rc = 1;
  MEK_Binding: MEK + raf_Lymphocyte_58 => MEK_raf; mek*MEK*raf_Lymphocyte_58; MEK_Binding is "MEK-Binding";
    mek = 1;
  phosphorylation: MEK_raf => MEK_P + raf_Lymphocyte_57; mekp*MEK_raf;
    mekp = 1;
  RAF_MEK_complex: MEK_P + raf_Lymphocyte_58 => pMEK_raf_2; rm*MEK_P*raf_Lymphocyte_58; RAF_MEK_complex is "RAF-MEK complex";
    rm = 1;
  phosporylation: pMEK_raf_2 => MEK_pp + raf_Lymphocyte_57; mpp*pMEK_raf_2;
    mpp = 1;
  CREB_translocation: p_CREB + cbp => cbp_creb; ct*p_CREB*cbp; CREB_translocation is "CREB-translocation";
    ct = 1;
  transcription_2: $DNA + cbp_creb => mRNA_2 + mRNA_3; tr*DNA*cbp_creb;
    tr = 1;
  // P. Thomas, Y. Pang, E. J. Filardo and J. Dong. Identity of an Estrogen Membrane Receptor Coupled to a G Protein in Human Breast Cancer Cells. Endocrinology 146 (2): 624; Yefei Pang, Jing Dong, and Peter Thomas. Estrogen Signaling Characteristics of Atlantic Croaker G Protein-Coupled Receptor 30 (GPR30) and Evidence It Is Involved in Maintenance of Oocyte Meiotic Arrest. Endocrinology. 2008 July; 149(7): 3410–3426.
  E_GPCR_activation: Estrogen + $GPCR => cAMP; Vm2*Estrogen/(Km1 + Estrogen); E_GPCR_activation is "E-GPCR activation";
    Vm2 = 0.114; Km1 = 2.7;
  PKA_activation: PKA_Lymphocyte_36 + cAMP => PKA_Lymphocyte_37; pk*PKA_Lymphocyte_36*cAMP;
    pk = 1;
  ER_binding: ER + Estrogen => E_ER; erb*ER*Estrogen;
    erb = 1;
  ER_Ras_activation: E_ER + shc_grb2_sos + ras_Lymphocyte_56 => ras_Lymphocyte_55; era*E_ER*shc_grb2_sos*ras_Lymphocyte_56; ER_Ras_activation is "ER-Ras activation";
    era = 1;
  grb2_sos_signaling: E_ER + shc_grb2_sos => EER_shcgrb2sos; eg*E_ER*shc_grb2_sos; grb2_sos_signaling is "grb2-sos signaling";
    eg = 1;
  ER_Pi3k_activation: EER_shcgrb2sos + pi3k_Lymphocyte_42 => pi3k_Lymphocyte_43; ep*EER_shcgrb2sos*pi3k_Lymphocyte_42; ER_Pi3k_activation is "ER-Pi3k activation";
    ep = 1;
  AKT_activation: pi3k_Lymphocyte_43 + Akt + a2AR_Clo => p_Akt; at_1*pi3k_Lymphocyte_43*Akt*a2AR_Clo;
    at_1 = 1;
  NOS_activation: $L_Arg + $iNOS => NO; NOS_activation_hg*L_Arg/(NOS_activation_fd + L_Arg);
    NOS_activation_fd = 32.3; NOS_activation_hg = 1052;
  bcl2_activation: BCL2_Lymphocyte_46 + p_Akt => BCL2_Lymphocyte_47; bc*BCL2_Lymphocyte_46*p_Akt;
    bc = 1;
  anti_apoptotic_signal_2: mRNA_2 => survival_signal; as*mRNA_2; anti_apoptotic_signal_2 is "anti-apoptotic signal 2";
    as = 1;
  anti_apopototic_signal_1: BCL2_Lymphocyte_47 => survival_signal; aps*BCL2_Lymphocyte_47; anti_apopototic_signal_1 is "anti-apopototic signal 1";
    aps = 1;
  cER_binding: Estrogen + $cER => E_cER; ecr*Estrogen*cER;
    ecr = 1;
  ER_Dimerization: E_cER => E_cER_2; ed*E_cER; ER_Dimerization is "ER-Dimerization";
    ed = 1;
  transcription_3: E_cER_2 + $DNA => mRNA_3; nt*E_cER_2*DNA;
    nt = 1;
  IFNG_production: mRNA_3 => IFN_g; ifp*mRNA_3;
    ifp = 1;
  AR_beta_activation: $b2_AR + terbutaline => b2AR_Ter; bt*terbutaline/(kbt + terbutaline);
    bt = 0.000391; kbt = 19.9;
  transcription_1: $DNA + p_Akt => mRNA_1; transcription_1_kj*DNA*p_Akt;
    transcription_1_kj = 1;
  translation: mRNA_1 => IL_2; kl*mRNA_1;
    kl = 1;
  ras_activation: IFNg_IFNGR_2_Lymphocyte_27 + ras_Lymphocyte_56 + shc_grb2_sos => ras_Lymphocyte_55; kx*IFNg_IFNGR_2_Lymphocyte_27*ras_Lymphocyte_56*shc_grb2_sos;
    kx = 1;
  raf_activation: raf_Lymphocyte_57 + ras_Lymphocyte_55 => raf_Lymphocyte_58; raf_activation_kc*raf_Lymphocyte_57*ras_Lymphocyte_55;
    raf_activation_kc = 1;
  signaling: CREB + a1AR_Phe => p_CREB; nkn*CREB*a1AR_Phe;
    nkn = 1;
  PKA_Activation: a2AR_Clo + PKA_Lymphocyte_37 => PKA_Lymphocyte_36; ml*a2AR_Clo*PKA_Lymphocyte_37;
    ml = 1;
  PKA_activation2: b2AR_Ter + PKA_Lymphocyte_36 => PKA_Lymphocyte_37; gh*b2AR_Ter*PKA_Lymphocyte_36;
    gh = 1;
  anti_apoptotic_signal_4: mRNA_3 => survival_signal; bnb*mRNA_3; anti_apoptotic_signal_4 is "anti-apoptotic signal 4";
    bnb = 1;
  AKT_activation_1: b2AR_Ter + pi3k_Lymphocyte_42 => pi3k_Lymphocyte_43; jk*b2AR_Ter*pi3k_Lymphocyte_42;
    jk = 1;
  NO_signaling: NO + CAAT => C_EBP; NO_signaling_vm*NO*CAAT;
    NO_signaling_vm = 1;
  NO_signalling: C_EBP => CHOP_Lymphocyte; vc*CAAT/(NO_signalling_kc + CAAT);
    vc = 1; NO_signalling_kc = 1;
  transcription_4: $DNA + CHOP_Lymphocyte => mRNA_4; vch*CHOP_Nucleus/(kch + CHOP_Nucleus);
    vch = 1; kch = 1;
  BAX_activation: mRNA_4 => BAX; fbax*mRNA_4;
    fbax = 1;
  dimerisation: BAX + BCL2_Lymphocyte_46 => BCL2_BAX_dimer; vbax*BAX/(kbax + BAX);
    vbax = 1; kbax = 1;
  pro_apoptotic_signal: BCL2_BAX_dimer + Peroxynitrite => apoptosis; 1; pro_apoptotic_signal is "pro-apoptotic signal";
  ERK_Phosphorylation: PKA_Lymphocyte_37 + ERK => p_ERK; ERK_Phosphorylation_fd*PKA_Lymphocyte_37*ERK; ERK_Phosphorylation is "ERK-Phosphorylation";
    ERK_Phosphorylation_fd = 1;
  transcription_5: $DNA + p_Akt => mRNA_5; transcription_5_kj*DNA*p_Akt;
    transcription_5_kj = 1;
  iNOS_transcripn: mRNA_5 => $iNOS; iNOS_transcripn_hg*mRNA_5;
    iNOS_transcripn_hg = 1;
  anti_apopototic_signal_3: IL_2 => survival_signal; anti_apopototic_signal_3_kj*IL_2; anti_apopototic_signal_3 is "anti-apopototic signal 3";
    anti_apopototic_signal_3_kj = 1;
  // P. Thomas, Y. Pang, E. J. Filardo and J. Dong. Identity of an Estrogen Membrane Receptor Coupled to a G Protein in Human Breast Cancer Cells. Endocrinology 146 (2): 624; Yefei Pang, Jing Dong, and Peter Thomas. Estrogen Signaling Characteristics of Atlantic Croaker G Protein-Coupled Receptor 30 (GPR30) and Evidence It Is Involved in Maintenance of Oocyte Meiotic Arrest. Endocrinology. 2008 July; 149(7): 3410–3426.
  transcription_6: p_ERK + $DNA => mRNA_6; f1*p_ERK*DNA;
    f1 = 1;
  // (The FASEB Journal. 2006;20:A133) © 2006 FASEB 114.2 24,25(OH)2D3 binds catalase Ilka Nemere , Dennis Larsson , Deryk Anderson and Nathan Smith Nutrition and Food Sciences, Utah State University, 8700 Old Main Hill, Logan, UT, 84322-8700 P. Thomas, Y. Pang, E. J. Filardo and J. Dong. Identity of an Estrogen Membrane Receptor Coupled to a G Protein in Human Breast Cancer Cells. Endocrinology 146 (2): 624; Yefei Pang, Jing Dong, and Peter Thomas. Estrogen Signaling Characteristics of Atlantic Croaker G Protein-Coupled Receptor 30 (GPR30) and Evidence It Is Involved in Maintenance of Oocyte Meiotic Arrest. Endocrinology. 2008 July; 149(7): 3410–3426.
  CAT_activity: superoxides + CAT => survival_signal; v1*superoxides/(k1 + superoxides);
    v1 = 209.34; k1 = 5.6;
  // P. Thomas, Y. Pang, E. J. Filardo and J. Dong. Identity of an Estrogen Membrane Receptor Coupled to a G Protein in Human Breast Cancer Cells. Endocrinology 146 (2): 624; Yefei Pang, Jing Dong, and Peter Thomas. Estrogen Signaling Characteristics of Atlantic Croaker G Protein-Coupled Receptor 30 (GPR30) and Evidence It Is Involved in Maintenance of Oocyte Meiotic Arrest. Endocrinology. 2008 July; 149(7): 3410–3426.
  transcription_7: p_ERK + $DNA => mRNA_7; jh*p_ERK*DNA;
    jh = 1;
  // P. Thomas, Y. Pang, E. J. Filardo and J. Dong. Identity of an Estrogen Membrane Receptor Coupled to a G Protein in Human Breast Cancer Cells. Endocrinology 146 (2): 624; Yefei Pang, Jing Dong, and Peter Thomas. Estrogen Signaling Characteristics of Atlantic Croaker G Protein-Coupled Receptor 30 (GPR30) and Evidence It Is Involved in Maintenance of Oocyte Meiotic Arrest. Endocrinology. 2008 July; 149(7): 3410–3426.
  SOD_activity: superoxides + SOD => survival_signal; v2*superoxides/(k2 + superoxides);
    v2 = 120; k2 = 1.5;
  // P. Thomas, Y. Pang, E. J. Filardo and J. Dong. Identity of an Estrogen Membrane Receptor Coupled to a G Protein in Human Breast Cancer Cells. Endocrinology 146 (2): 624; Yefei Pang, Jing Dong, and Peter Thomas. Estrogen Signaling Characteristics of Atlantic Croaker G Protein-Coupled Receptor 30 (GPR30) and Evidence It Is Involved in Maintenance of Oocyte Meiotic Arrest. Endocrinology. 2008 July; 149(7): 3410–3426.
  PON_formation: superoxides + NO => Peroxynitrite; gf*superoxides*NO;
    gf = 1;
  CAT_transcription: mRNA_6 => CAT; CAT_transcription_kj*mRNA_6;
    CAT_transcription_kj = 1;
  SOD_transcripn: mRNA_7 => SOD; SOD_transcripn_kj*mRNA_7;
    SOD_transcripn_kj = 1;
end
